OPTI 'DIME' 2 'ECHO' 0;
OPTI 'MODE' 'PLAN' 'CONT';
* Atelier Mailleur : importer depuis le dossier contenant le fichier UNV.
TAB1 = LIRE 'UNV' 'import_cast3m.unv' ;
MAIL1 = TAB1 . 'MAILLAGE' ;
* Completer ensuite modele, materiau, chargement et conditions limites.

OPTI 'MODE' 'PLAN' 'CONT';
LIST TAB1;
MESS 'MAILLEUR_NODES=' (NBNO (TAB1.'NOEUDS'));
MESS 'MAILLEUR_ELEMENTS=' (NBEL MAIL1);
MESS 'MAILLEUR_TYPE_SEG2=' (NBEL (TAB1.'@SEG2'));
MESS 'MAILLEUR_TYPE_TRI3=' (NBEL (TAB1.'@TRI3'));
MESS 'MAILLEUR_G_000=' (NBEL (TAB1.'BOUNDARY'));
MESS 'MAILLEUR_GN_000=' (NBNO (TAB1.'BOUNDARY_GN'));
MESS 'MAILLEUR_G_001=' (NBEL (TAB1.'DOMAIN'));
MESS 'MAILLEUR_GN_001=' (NBNO (TAB1.'DOMAIN_GN'));
MESS 'MAILLEUR_G_002=' (NBEL (TAB1.'EDGE_001'));
MESS 'MAILLEUR_GN_002=' (NBNO (TAB1.'EDGE_001_GN'));
MESS 'MAILLEUR_G_003=' (NBEL (TAB1.'EDGE_002'));
MESS 'MAILLEUR_GN_003=' (NBNO (TAB1.'EDGE_002_GN'));
MESS 'MAILLEUR_G_004=' (NBEL (TAB1.'EDGE_003'));
MESS 'MAILLEUR_GN_004=' (NBNO (TAB1.'EDGE_003_GN'));
MESS 'MAILLEUR_G_005=' (NBEL (TAB1.'EDGE_004'));
MESS 'MAILLEUR_GN_005=' (NBNO (TAB1.'EDGE_004_GN'));
MESS 'MAILLEUR_G_006=' (NBEL (TAB1.'GEOMETRY_1D'));
MESS 'MAILLEUR_GN_006=' (NBNO (TAB1.'GEOMETRY_1D_GN'));
MESS 'MAILLEUR_G_007=' (NBEL (TAB1.'PART_001'));
MESS 'MAILLEUR_GN_007=' (NBNO (TAB1.'PART_001_GN'));
MESS 'MAILLEUR_MIN_1=' (MINI (COOR 1 MAIL1));
MESS 'MAILLEUR_MAX_1=' (MAXI (COOR 1 MAIL1));
MESS 'MAILLEUR_MIN_2=' (MINI (COOR 2 MAIL1));
MESS 'MAILLEUR_MAX_2=' (MAXI (COOR 2 MAIL1));
DOM = TAB1.'DOMAIN';
NODS = CHAN DOM 'POI1';
XC = COOR 1 NODS;
YC = COOR 2 NODS;
GAU = XC POIN 'MINI';
DRO = XC POIN 'MAXI';
BAS = YC POIN 'MINI';
FAD = TAB1.'BOUNDARY' ELEM 'APPU' 'STRICTEMENT' DRO;
MO = MODE DOM 'MECANIQUE' 'ELASTIQUE';
MA = MATE MO 'YOUN' 210000. 'NU' 0.29999999999999999;
RI = RIGI MO MA;
BL1 = BLOQ 'UX' GAU;
BL2 = BLOQ 'UY' BAS;
FO = FSUR 'MASS' MO (10. 0.) FAD;
UU = RESO (RI ET BL1 ET BL2) FO;
UX1 = EXCO 'UX' UU 'UX';
UY1 = EXCO 'UY' UU 'UY';
UTH = (10. / 210000.) * (NOMC 'UX' XC);
YTH = (-3. / 210000.) * (NOMC 'UY' YC);
ERRU = MAXI (UX1 - UTH) 'ABS';
SG = SIGM MO MA UU;
REA = REAC BL1 UU;
MESS 'MAILLEUR_UERROR=' ERRU;
MESS 'MAILLEUR_YERROR=' (MAXI (UY1 - YTH) 'ABS');
MESS 'MAILLEUR_UMAX=' (MAXI UX1);
MESS 'MAILLEUR_YMIN=' (MINI UY1);
MESS 'MAILLEUR_SMIN=' (MINI SG (MOTS 'SMXX'));
MESS 'MAILLEUR_SMAX=' (MAXI SG (MOTS 'SMXX'));
MESS 'MAILLEUR_FORCE_X=' (SOMM (EXTR FO 'VALE' 'FX'));
MESS 'MAILLEUR_REACTION_X=' (SOMM (EXTR REA 'VALE' 'FX'));
MESS 'MAILLEUR_VALIDATION_OK';
FIN;
